# Задание 2
x1 := 2
y1 := 10
x2 := 10
y2 := 9
x3 := 15
y3 := 11
x4 := 4
y4 := 4
x5 := 9
y5 := 15
P1(x, y) := [x1; y1; 0]
P2(x, y) := [x2; y2; 0]
P3(x, y) := [x3; y3; 0]
P4(x, y) := [x4; y4; 0]
P5(x, y) := [x5; y5; 0]
T1 := CreateMesh(P1, x1, x1, y1, y1)
T2 := CreateMesh(P2, x2, x2, y2, y2)
T3 := CreateMesh(P3, x3, x3, y3, y3)
T4 := CreateMesh(P4, x4, x4, y4, y4)
T5 := CreateMesh(P5, x5, x5, y5, y5)
Ln14(u, v) := [x1 + (x4 - x1)*u; y1 + (y4 - y1)*u; 0]
Ln15(u, v) := [x1 + (x5 - x1)*u; y1 + (y5 - y1)*u; 0]
Ln35(u, v) := [x3 + (x5 - x3)*u; y3 + (y5 - y3)*u; 0]
Ln23(u, v) := [x2 + (x3 - x2)*u; y2 + (y3 - y2)*u; 0]
Ln24(u, v) := [x2 + (x4 - x2)*u; y2 + (y4 - y2)*u; 0]
L14 := CreateMesh(Ln14, 0, 1, 0, 0)
L15 := CreateMesh(Ln15, 0, 1, 0, 0)
L35 := CreateMesh(Ln35, 0, 1, 0, 0)
L23 := CreateMesh(Ln23, 0, 1, 0, 0)
L24 := CreateMesh(Ln24, 0, 1, 0, 0)
# [component: inputs L14, L15, L35, L23, L24]
# Задание 3
x_15_center := (x1 + x5)/2
x_23_center := (x2 + x3)/2
x_24_center := (x2 + x4)/2
y_15_center := (y1 + y5)/2
y_23_center := (y2 + y3)/2
y_24_center := (y2 + y4)/2
P15_triangle(x, y) := [x_15_center; y_15_center; 0]
P23_triangle(x, y) := [x_23_center; y_23_center; 0]
P24_triangle(x, y) := [x_24_center; y_24_center; 0]
T15_triangle := CreateMesh(P15_triangle, x_15_center, x_15_center, y_15_center, y_15_center)
T23_triangle := CreateMesh(P23_triangle, x_23_center, x_23_center, y_23_center, y_23_center)
T24_triangle := CreateMesh(P24_triangle, x_24_center, x_24_center, y_24_center, y_24_center)
Ln1_triangle(u, v) := [x_15_center + (x_23_center - x_15_center)*u; y_15_center + (y_23_center - y_15_center)*u; 0]
Ln2_triangle(u, v) := [x_23_center + (x_24_center - x_23_center)*u; y_23_center + (y_24_center - y_23_center)*u; 0]
Ln3_triangle(u, v) := [x_15_center + (x_24_center - x_15_center)*u; y_15_center + (y_24_center - y_15_center)*u; 0]
L1_triangle := CreateMesh(Ln1_triangle, 0, 1, 0, 0)
L2_triangle := CreateMesh(Ln2_triangle, 0, 1, 0, 0)
L3_triangle := CreateMesh(Ln3_triangle, 0, 1, 0, 0)
# [component: inputs L14, L15, L35, L23, L24, L1_triangle, L2_triangle, L3_triangle]
# Задание 3
# Задание 7
Ln_parallel(u, v) := P1(u, v) + [(x4 - x3)*u; (y4 - y3)*u; 0]
T_parallel := CreateMesh(Ln_parallel, -0.5, 0.5, 0, 0)
P1_parallel(u, v) := Ln_parallel(0.5, 0)
P2_parallel(u, v) := Ln_parallel(-0.5, 0)
# [component: inputs L14, L15, L35, L23, L24, T_parallel, P1_parallel, P2_parallel]
# Задание 8
