# Задание 2
# Параметрическое представление | Явное представление
x(t) := 6*cos(4*t) + 1
y(t) := 4*sin(4*t) - 5
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6*cos(4*t2) + 1 == x2 solve, t2 → [acos(x2/6 - 1/6)/4; -acos(x2/6 - 1/6)/4]
y2_1(x2) := 4*sin(4*acos(x2/6 - 1/6)/4) - 5 → 4*sqrt(1 - (1/6*x2 - 1/6)^2) - 5
y2_2(x2) := -4*sin(4*acos(x2/6 - 1/6)/4) - 5 → -4*sqrt(1 - (1/6*x2 - 1/6)^2) - 5
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# Задание 3
Ellipse_x0 := 18
Hyper_x0 := 12
Parab_x0 := 112
Ellipse_y0 := 9
Hyper_y0 := 7
Parab_y0 := 14
Ellipse_a := 3
Hyper_a := 14
Parab_p := 7
Ellipse_b := 18
Hyper_b := 8
